<?xml version="1.0"?>


<piston_engine name="Bristol Hercules">
    <injected>1</injected>
    <minmp unit="INHG">          6.0 </minmp>
    <maxmp unit="INHG">         40.0 </maxmp>
    <displacement unit="IN3"> 1868.00 </displacement>
    <maxhp>        2040.00 </maxhp>
    <cycles>         2.0 </cycles>
    <idlerpm>      1000.0 </idlerpm>
    <maxthrottle>    1.0 </maxthrottle>
    <minthrottle>    0.2</minthrottle>
    <takeoffboost>18</takeoffboost>  <!--not real,will be deleted or updated-->
</piston_engine>
